** -----------------------------------------------------
*Heading
*Node, nset=set-all
      1,           0.,           0.,  0.430000007
      2,  0.456999987,           0.,  0.430000007
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** -----------------------------------------------------
*Element, type=C3D8, elset= ALL
	  1,  486,  487, 2727, 2667,   27,   26,  431,  430
	  2,  487,  488, 2728, 2727,   26,   25,  432,  431
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*Element, type=t3d2, elset=Rebar_real
	10001	,	10009	,	10095
	10002	,	10095	,	10096
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*Element, type=t3d2, elset=Rebar
	20001	,	20009	,	20095
	20002	,	20095	,	20096
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** --------------------------------------------- **
*USER ELEMENT, TYPE=U6, NODE=4, COORDINATES=3, PROPERTIES=9, VARIABLES=4000
	1, 2, 3
*Element,  TYPE=U6, ELSET=REBAR_C
	30001	,	10009	,	10095	,	20095	,	20009
	30002	,	10095	,	10096	,	20096	,	20095
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*UEL PROPERTY, ELSET = REBAR_C
	5, 0.15, 100, 2, 3, 3, 0.02, 0.02,
	10
** -----------------------------------------------------
*Solid Section, elset=ALL, material=C30
	,
*Solid Section, elset=Rebar, material=STEEL02
	0.1,
*Solid Section, elset=Rebar_real, material=STEEL02_REAL
	0.001452
**
*Nset, nset=BC1
	3,    4,    6,   14,   15,   56
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*Nset, nset=LOADX
	10004
** -----------------------------------------------------
** Constraint: Embed-1
*Embedded Element, host elset=ALL
	Rebar
** -----------------------------------------------------
*Amplitude, name=AMP-TEST1
	  0.,              0.00,
	  2.,              0.002,
	  4.,              0.000,
	  6.,             -0.002,
	  8.,              0.000,
	  **
	  12.,              0.004,
	  16.,              0.000,
	  20.,             -0.004,
	  24.,              0.000,
	  **
	  30.,              0.01,
	  36.,              0.000,
	  42.,             -0.01,
	  48.,              0.000,
      **
	  54.,              0.025,
	  60.,              0.000,
	  66.,             -0.025,
	  72.,              0.000,
      **
	  82.,              0.04,
	  92.,              0.000,
	  102.,             -0.04,
	  112.,              0.000,
** -----------------------------------------------------
** MATERIALS
**
*Material, name=C30
*Elastic
	3e+10., 0.2
**
** MATERIAL FOR REBAR
**
*Material, name=STEEL02
*Elastic
	200000, 0.3
*Material, name=STEEL02_REAL
*Elastic
   1.9e+11,0.
*Plastic
   4.80e+08,   0.
   6.55e+08,     0.19
** -----------------------------------------------------
*Material, name=umatelemX
*Depvar
	120,
*User Material, constants=2
	1.0e-11, 0.2
**
** ----------------------------------------------------------------
**
** STEP: Step-1
**
*Step, name=Step-1, nlgeom=NO, inc=100000
*Static
	0.02, 112., 1e-05, 0.02
**
** BOUNDARY CONDITIONS
**
** Name: BC-1 Type: Displacement/Rotation
*Boundary
	BC1, 1, 1
	BC1, 2, 2
	BC1, 3, 3
** Name: BC-2 Type: Displacement/Rotation
*Boundary
	LOADX, 1, 1
	LOADX, 2, 2
** Name: BC-3 Type: Displacement/Rotation
*Boundary, amplitude=AMP-TEST1
	LOADX, 3, 3, 1
**
** CONTROLS
**
**  ------------------------------------------------------------------- **
**
** OUTPUT REQUESTS
**
*Restart, write, frequency=0
**
** FIELD OUTPUT: F-Output-1
**
**
*Output, field, time interval=0.2
*Node Output
 U, RF
*Element Output, directions=YES
 E, LE, S, SDV, STATUS, SDV
**
** HISTORY OUTPUT: H-Output-1
**
*Output, history, variable=PRESELECT
**
*END STEP
